R_1 := 1 MΩ
R_2 := 330 kΩ
k := 16*10^-21 W/Hz
R_filter := 1 kΩ
R4 := 1 kΩ
R3 := 5 kΩ
R_5 := 1 MΩ
R_12 := (R_1^-1 + R_2^-1)^-1 = 248.12 kΩ
R_12tæthed := sqrt(k*R_12) = 63.0073 nV/sqrt(Hz)
R3_tæthed := sqrt(k*R3) = 8.94427 nV/sqrt(Hz)
R4_tæthed := sqrt(k*R4) = 4 nV/sqrt(Hz)
e_nU1A := 16*nV/sqrt(Hz)
e_nU1B := 1.2*16*nV/sqrt(Hz) = 19.2 nV/sqrt(Hz)
e_førU1B := 0.2*sqrt(e_nU1A^2 + R3_tæthed^2 + R_12tæthed^2) = 13.1239 nV/sqrt(Hz)
e_tæthed := sqrt(e_førU1B^2 + R4_tæthed^2 + e_nU1B^2) = 23.5982 nV/sqrt(Hz)
# kravtil filter: Skal være en tredje del af etæthed
Filter_krav := e_tæthed/3 = 7.86608 nV/sqrt(Hz)
B_filter := 20 kHz
B_adc := 11 kHz
V_adc := 10^(-81/20)*0.71 V = 63.2788 μV
e_adc := V_adc/sqrt(B_adc) = 603.34 nV/sqrt(Hz)
e_samlet := sqrt(e_tæthed^2 + e_adc^2) = 0.603801 μV/sqrt(Hz)
e_samlet*sqrt(B_filter) = 85.3904 μV
